Simulations: Version=195
  Simulation
    Clock: Start=2016-01-01; End=2016-12-31
    Summary
    Weather: FileName=SoybeanProject/data/raw/USA/lowa周边地区天气文件数据来源于气象网站/AMW.met
    SoilArbitrator
    MicroClimate: a_interception=0; b_interception=1; c_interception=0.25; d_interception=0; SoilHeatFluxFraction=0.5; MinimumHeightDiffForNewLayer=0; NightInterceptionFraction=0.5; ReferenceHeight=2
    Zone Field: Area=1; Slope=0; AspectAngle=0; Altitude=287
      Report: EventNames=[Clock].EndOfDay
        VariableNames:
          [Clock].Today
          [Soybean].Phenology.Stage
          [Soybean].Phenology.CurrentStageName
          [Plant].Leaf.LAI
          [Plant].Leaf.Live.Wt
          [Plant].Stem.Live.Wt
          [Plant].Grain.Total.Wt
          [Plant].Grain.Total.Wt * 10 as Yield
          [Plant].Grain.Number
          [Plant].Grain.Size
          [Plant].Grain.NConc
          [Plant].Grain.Total.N
          [Plant].WaterUptake
          [Soil].SoilWater.Water
      Fertiliser
      Soil Clarion_loam_L138B: ASCOrder=Mollisols; ASCSubOrder=Black; SoilType=Clay; Site=Norwin; NearestTown=Norwin; Region=Darling Downs and Granite Belt; State=Iowa; Country=US; NaturalVegetation=Qld. Bluegrass, possible Qld. Blue gum; ApsoilNumber=900; Latitude=42.03; Longitude=-93.63; LocationAccuracy=+/- 20m; YearOfSampling=0
        DataSource=CSIRO Sustainable Ecosystems, Toowoomba; Characteriesd as part of the GRDC funded project"Doing it better, doing it smarter, managing soil water in Australian agriculture' 2011
        Comments=Clay - OC, CLL for all crops estimated-based on Bongeen Mywybilla Soil No1
        Physical
          Thickness  ParticleSizeSand  ParticleSizeSilt  ParticleSizeClay  Rocks  BD    AirDry  LL15   DUL    SAT    KS
          150        45                34                21                0      1.3   0.072   0.145  0.286  0.509  792.3
          150        45                34                21                0      1.32  0.071   0.142  0.284  0.502  792.3
          300        45                34                21                0      1.39  0.062   0.125  0.272  0.475  792.3
          300        45.8              34.4              19.8              0      1.44  0.059   0.117  0.265  0.457  792.3
          300        49                36                15                0      1.6   0.048   0.095  0.246  0.396  792.3
          300        49                36                15                0      1.6   0.048   0.095  0.246  0.396  792.3
          300        49                36                15                0      1.6   0.048   0.095  0.246  0.396  792.3
          SoilCrop SoybeanSoil: LL=[0.145, 0.142, 0.125, 0.117, 0.095, 0.095, 0.095]; KL=[0.06, 0.06, 0.06, 0.06, 0.06, 0.06, 0.06]; XF=[1, 1, 1, 1, 1, 1, 1]
        WaterBalance SoilWater: SummerDate=1-Nov; SummerU=5; SummerCona=5; WinterDate=1-Apr; WinterU=5; WinterCona=5; DiffusConst=40; DiffusSlope=16; Salb=0.12; CN2Bare=73; CNRed=20; CNCov=0.8; PSIDul=-100; Thickness=[150, 150, 300, 300, 300, 300, 300]; SWCON=[0.3, 0.3, 0.3, 0.3, 0.3, 0.3, 0.3]
        Organic: FOMCNRatio=40; CarbonUnits=Total
          Thickness  Carbon  SoilCNRatio  FBiom  FInert  FOM
          150        3.5     12           0.04   0.4     347.1
          150        3.03    12           0.02   0.6     270.3
          300        1.04    12           0.02   0.8     164
          300        0.65    12           0.02   1       99.5
          300        0.25    12           0.01   1       60.3
          300        0.25    12           0.01   1       36.6
          300        0       0            0      0       0
        Chemical: PHUnits=Water
          Thickness  PH   CEC
          150        6.2  11.045
          150        6.2  10.505
          300        6.5  9.695
          300        6.9  9.02
          300        8    8.75
          300        8    8.615
          300        8    8.615
          CEC source: Calculated
        Water: Thickness=[150, 150, 300, 300, 300, 300, 300]; InitialValues=[0.286, 0.284, 0.272, 0.265, 0.246, 0.246, 0.246]; FilledFromTop=false
        Nutrient
        Solute NO3: Thickness=[150, 150, 300, 300, 300, 300, 300]; InitialValues=[1, 1, 1, 1, 1, 1, 1]; InitialValuesUnits=kg/ha; WaterTableConcentration=0; D0=0; DepthConstant=0; MaxDepthSoluteAccessible=0; RunoffEffectivenessAtMovingSolute=0; MaxEffectiveRunoff=0
        Solute NH4: Thickness=[150, 150, 300, 300, 300, 300, 300]; InitialValues=[0.1, 0.1, 0.1, 0.1, 0.1, 0.1, 0.1]; InitialValuesUnits=kg/ha; WaterTableConcentration=0; D0=0; DepthConstant=0; MaxDepthSoluteAccessible=0; RunoffEffectivenessAtMovingSolute=0; MaxEffectiveRunoff=0
        Solute Urea: Thickness=[150, 150, 300, 300, 300, 300, 300]; InitialValues=[0, 0, 0, 0, 0, 0, -]; InitialValuesUnits=kg/ha; WaterTableConcentration=0; D0=0; DepthConstant=0; MaxDepthSoluteAccessible=0; RunoffEffectivenessAtMovingSolute=0; MaxEffectiveRunoff=0
        SoilTemperature Temperature: Thickness=[150, 150, 300, 300, 300, 300, 300]; InitialValues=[-1.3, -1, 2, 5, 7.5, 8, 8]
      SurfaceOrganicMatter: InitialResidueName=maize; InitialResidueType=maize; InitialResidueMass=100; InitialStandingFraction=0; InitialCPR=0; InitialCNR=55
      Plant Soybean
        Cultivar Latham L2744 XF
          Command:
            using Models.Core;
            using System;
            using System.Collections.Generic;
            using Models.PMF;
            public class ManagerScript : Script
            {
                [Link]
                private Paddock MyPaddock = null;
                private bool Sown = false;
                [EventSubscribe("DoManagement")]
                private void OnPrepare(Object sender, EventArgs e)
                {
                    // 獲取大豆模型實例
                    var soybean = MyPaddock.Find("Soybean") as Plant;
                    // --- 出苗 (Emergence) ---
                    soybean.Find("Phenology").Set("BaseTemperature.FixedValue", 10.0);
                    soybean.Find("Phenology").Set("Emergence.Target.FixedValue", 70.0);
                    // --- 物候 (Phenology - thermal time) ---
                    soybean.Find("Phenology").Set("DTSMTB.XYPairs", new double[] {0.0,0.0, 7.0,0.0, 30.0,23.0, 45.0,38.0});
                    soybean.Find("Phenology").Set("Vegetative.Target.FixedValue", 675.0);
                    soybean.Find("Phenology").Set("Reproductive.Target.FixedValue", 1000.0);
                    // --- 初始狀態 (Initial state) ---
                    soybean.Find("Leaf").Set("InitialWt.FixedValue", 120.0);
                    soybean.Find("Leaf").Set("RGRLai.FixedValue", 0.0100);
                    // --- 光合作用與二氧化碳 (Photosynthesis & CO2) ---
                    soybean.Find("Leaf").Find("Photosynthesis").Set("RUE.FixedValue", 1.7);
                    soybean.Find("Leaf").Set("ExtinctionCoefficient.FixedValue", 0.8);
                    soybean.Find("Leaf").Find("Photosynthesis").Set("TemperatureResponse.XYPairs", new double[] {0.0,0.0, 10.0,0.3, 20.0,0.6, 25.0,0.8, 30.0,1.0, 35.0,1.0});
                    soybean.Find("Leaf").Find("Photosynthesis").Set("CO2EfficiencyModifier.XYPairs", new double[] {40.0,0.0, 360.0,1.0, 720.0,1.11, 1000.0,1.11, 2000.0,1.11});
                    soybean.Find("Leaf").Find("Photosynthesis").Set("CO2TranspirationModifier.XYPairs", new double[] {40.0,0.0, 360.0,1.0, 720.0,0.9, 1000.0,0.9, 2000.0,0.9});
                    soybean.Find("Leaf").Find("Photosynthesis").Set("CO2AmaxModifier.XYPairs", new double[] {40.0,0.0, 360.0,1.0, 720.0,1.6, 1000.0,1.9, 2000.0,1.9});
                    // --- 轉化效率 (Conversion efficiencies) ---
                    soybean.Find("Biomass").Find("ConversionEfficiency").Set("Leaf.FixedValue", 0.72);
                    soybean.Find("Biomass").Find("ConversionEfficiency").Set("Stem.FixedValue", 0.72);
                    soybean.Find("Biomass").Find("ConversionEfficiency").Set("Root.FixedValue", 0.72);
                    // 注意：對於大豆，CVO 通常對應 Grain（籽粒）。
                    soybean.Find("Biomass").Find("ConversionEfficiency").Set("Grain.FixedValue", 0.69);
                    // --- 維護性呼吸 (Maintenance respiration) ---
                    soybean.Find("Biomass").Find("MaintenanceRespiration").Set("Leaf.FixedValue", 0.030);
                    soybean.Find("Biomass").Find("MaintenanceRespiration").Set("Stem.FixedValue", 0.015);
                    soybean.Find("Biomass").Find("MaintenanceRespiration").Set("Root.FixedValue", 0.010);
                    soybean.Find("Biomass").Set("Q10.FixedValue", 2.0);
                    // --- 生物量分配 (Partitioning) ---
                    soybean.Find("Partitioner").Set("FracRoot.XYPairs", new double[] {0.00,0.65, 0.75,0.35, 1.00,0.15, 1.50,0.00, 2.00,0.00});
                    soybean.Find("Partitioner").Set("FracLeaf.XYPairs", new double[] {0.00,0.70, 1.00,0.70, 1.15,0.55, 1.30,0.30, 1.50,0.10, 2.00,0.00});
                    soybean.Find("Partitioner").Set("FracStem.XYPairs", new double[] {0.00,0.30, 1.00,0.30, 1.15,0.20, 1.30,0.10, 1.50,0.05, 2.00,0.00});
                    // 注意：對於大豆，FOTB 對應 FracGrain（籽粒分配）。
                    soybean.Find("Partitioner").Set("FracGrain.XYPairs", new double[] {0.00,0.00, 1.00,0.00, 1.15,0.25, 1.30,0.60, 1.50,0.85, 2.00,1.00});
                    // --- 葉面積與衰老 (Leaf area & senescence) ---
                    soybean.Find("Leaf").Set("SLA.XYPairs", new double[] {0.0,0.0014, 0.45,0.0025, 0.90,0.0025, 2.0,0.0007});
                    soybean.Find("Leaf").Find("Senescence").Set("Age.FixedValue", 23.0);
                    soybean.Find("Leaf").Find("Senescence").Set("Perdl.FixedValue", 0.03);
                    // --- 根系 (Root) ---
                    soybean.Find("Root").Set("MaximumDepth.FixedValue", 1200.0);
                    soybean.Find("Root").Set("DailyDetachmentRate.XYPairs", new double[] {0.0,0.0, 1.5,0.0, 1.51,0.02, 2.0,0.02});
                }
                [EventSubscribe("Tick")]
                private void OnTick(Object sender, EventArgs e)
                {
                    // 播種指令：如果您的圖形化播種規則已經在運行，可以刪除此部分。
                    // 否則，請確保下面的品種名稱與您的設置一致。
                    if (!Sown && MyPaddock.Clock.Today.ToString("d-MMM") == "1-Jun")
                    {
                        var soybean = MyPaddock.Find("Soybean") as Plant;
                        // 使用您截圖中的播種參數
                        soybean.Sow(Cultivar: "Latham L2744 XF", Population: 38, Depth: 35, RowSpacing: 760, InitialDM: 120);
                        Sown = true;
                    }
                }
            }
      Manager Sow using a variable rule
        Crop = [Soybean]
        StartDate = 1-jun
        EndDate = 30-jun
        MinESW = 0
        MinRain = 0
        RainDays = 7
        CultivarName = Latham L2744 XF
        SowingDepth = 35
        RowSpacing = 760
        Population = 38
```csharp
using APSIM.Numerics;
using Models.Climate;
using System.Linq;
using System;
using Models.Core;
using Models.PMF;
using Models.Soils;
using Models.Utilities;
using APSIM.Shared.Utilities;
using Models.Interfaces;

namespace Models
{
    [Serializable]
    public class Script : Model
    {
        [Link] private Clock Clock;
        [Link] private Fertiliser Fertiliser;
        [Link] private Summary Summary;
        [Link] private Soil Soil;
        private Accumulator accumulatedRain;
        [Link]
        private ISoilWater waterBalance;
        
        [Description("Crop")]
        public IPlant Crop { get; set; }

        [Description("Start of sowing window (d-mmm)")]
        public string StartDate { get; set; }

        [Description("End of sowing window (d-mmm)")]
        public string EndDate { get; set; }

        [Description("Minimum extractable soil water for sowing (mm)")]
        public double MinESW { get; set; }

        [Description("Accumulated rainfall required for sowing (mm)")]
        public double MinRain { get; set; }

        [Description("Duration of rainfall accumulation (d)")]
        public int RainDays { get; set; }

        [Display(Type = DisplayType.CultivarName)]
        [Description("Cultivar to be sown")]
        public string CultivarName { get; set; }

        [Description("Sowing depth (mm)")]
        public double SowingDepth { get; set; }

        [Description("Row spacing (mm)")]
        public double RowSpacing { get; set; }

        [Description("Plant population (/m2)")]
        public double Population { get; set; }
        
        [EventSubscribe("StartOfSimulation")]
        private void OnSimulationCommencing(object sender, EventArgs e)
        {
            accumulatedRain = new Accumulator(this, "[Weather].Rain", RainDays);
        }

        [EventSubscribe("DoManagement")]
        private void OnDoManagement(object sender, EventArgs e)
        {
            accumulatedRain.Update();
            
            if (DateUtilities.WithinDates(StartDate, Clock.Today, EndDate) &&
                !Crop.IsAlive &&
                MathUtilities.Sum(waterBalance.ESW) > MinESW &&
                accumulatedRain.Sum > MinRain)
            {
                // --- 恢復到不含 InitialDM 的原始 Sow 指令 ---
                Crop.Sow(population: Population, cultivar: CultivarName, depth: SowingDepth, rowSpacing: RowSpacing);    
            }
        }
    }
}
```
      Manager Fertilise at sowing
        Crop = [Soybean]
        FertiliserType = NO3N
        Amount = 50
```csharp
using Models.Soils;
using System;
using System.Linq;
using Models.Core;
using Models.PMF;
namespace Models
{
    [Serializable]
    public class Script : Model
    {
        [Link] Clock Clock;
        [Link] Fertiliser Fertiliser;
        
        [Description("Crop to be fertilised")]
        public IPlant Crop { get; set; }

        [Description("Type of fertiliser to apply? ")] 
        [Display(Type = DisplayType.FertiliserType)]public string FertiliserType { get; set; }
    
        [Description("Amount of fertiliser to be applied (kg/ha)")]
        public double Amount { get; set; }
        
        [EventSubscribe("Sowing")]
        private void OnSowing(object sender, EventArgs e)
        {
            Model crop = sender as Model;
            if (Crop != null && crop.Name.ToLower() == (Crop as IModel).Name.ToLower())
                Fertiliser.Apply(amount: Amount, type: FertiliserType);
        }
    }
}
```
      Manager Harvest
        Crop = [Soybean]
```csharp
using APSIM.Shared.Utilities;
using Models.Utilities;
using Models.Soils;
using Models.PMF;
using Models.Core;
using System;
using System.Linq;

namespace Models
{
    [Serializable] 
    public class Script : Model
    {
        [Description("Crop")]
        public IPlant Crop { get; set; }
        
        [EventSubscribe("DoManagement")]
        private void OnDoManagement(object sender, EventArgs e)
        {
            if (Crop.IsReadyForHarvesting)
            {
                Crop.Harvest();
                Crop.EndCrop();
            }
        }
    }
}
```
  DataStore
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