Simulations: Version=205
  Summary
  Simulation
    Summary
    Clock: Start=2016-01-01; End=2016-12-31
    Weather: FileName=/Users/mengchang/Desktop/Soybean_APSIM_Workflow/AMW.met
    SoilArbitrator
    MicroClimate: a_interception=0; b_interception=1; c_interception=0.25; d_interception=0; SoilHeatFluxFraction=0.5; MinimumHeightDiffForNewLayer=0; NightInterceptionFraction=0.5; ReferenceHeight=2
    Zone Field: Area=1; Slope=0; AspectAngle=0; Altitude=287
      Fertiliser
      Soil Clarion_loam_L138B: ASCOrder=Mollisols; ASCSubOrder=Black; SoilType=Clay; Site=Norwin; NearestTown=Norwin; Region=Darling Downs and Granite Belt; State=Iowa; Country=US; NaturalVegetation=Qld. Bluegrass, possible Qld. Blue gum; ApsoilNumber=900; Latitude=42.03; Longitude=-93.63; LocationAccuracy=+/- 20m; YearOfSampling=0
        DataSource=CSIRO Sustainable Ecosystems, Toowoomba; Characteriesd as part of the GRDC funded project"Doing it better, doing it smarter, managing soil water in Australian agriculture' 2011
        Comments=Clay - OC, CLL for all crops estimated-based on Bongeen Mywybilla Soil No1
        Physical
          Thickness  ParticleSizeSand  ParticleSizeSilt  ParticleSizeClay  Rocks  BD    AirDry  LL15  DUL   SAT   KS
          150        45                34                21                0      1.3   0.072   0.15  0.3   0.47  792.3
          150        45                34                21                0      1.32  0.071   0.15  0.3   0.47  792.3
          300        45                34                21                0      1.39  0.062   0.14  0.29  0.46  792.3
          300        45.8              34.4              19.8              0      1.44  0.059   0.13  0.28  0.44  792.3
          300        49                36                15                0      1.6   0.048   0.12  0.27  0.39  792.3
          300        49                36                15                0      1.6   0.048   0.12  0.27  0.39  792.3
          300        49                36                15                0      1.6   0.048   0.11  0.26  0.39  792.3
          SoilCrop SoybeanSoil: LL=[0.145, 0.142, 0.125, 0.117, 0.095, 0.095, 0.095]; KL=[0.06, 0.06, 0.06, 0.06, 0.06, 0.06, 0.06]; XF=[1, 1, 1, 1, 1, 1, 1]
        WaterBalance SoilWater: SummerDate=1-Nov; SummerU=5; SummerCona=5; WinterDate=1-Apr; WinterU=5; WinterCona=5; DiffusConst=40; DiffusSlope=16; Salb=0.12; CN2Bare=73; CNRed=20; CNCov=0.8; PSIDul=-100; Thickness=[150, 150, 300, 300, 300, 300, 300]; SWCON=[0.35, 0.35, 0.35, 0.35, 0.35, 0.35, 0.35]
        Organic: FOMCNRatio=40; CarbonUnits=Total
          Thickness  Carbon  SoilCNRatio  FBiom  FInert  FOM
          150        3.5     12           0.04   0.4     347.1
          150        3.03    12           0.02   0.6     270.3
          300        1.04    12           0.02   0.8     164
          300        0.65    12           0.02   1       99.5
          300        0.25    12           0.01   1       60.3
          300        0.25    12           0.01   1       36.6
          300        0       0            0      0       0
        Chemical: PHUnits=Water
          Thickness  PH   CEC
          150        6.2  11.045
          150        6.2  10.505
          300        6.5  9.695
          300        6.9  9.02
          300        8    8.75
          300        8    8.615
          300        8    8.615
        Water: Thickness=[150, 150, 300, 300, 300, 300, 300]; InitialValues=[0.286, 0.284, 0.272, 0.265, 0.246, 0.246, 0.246]; FilledFromTop=false
        Nutrient
        Solute NO3: Thickness=[150, 150, 300, 300, 300, 300, 300]; InitialValues=[1, 1, 1, 1, 1, 1, 1]; InitialValuesUnits=kg/ha; WaterTableConcentration=0; D0=0; DepthConstant=0; MaxDepthSoluteAccessible=0; RunoffEffectivenessAtMovingSolute=0; MaxEffectiveRunoff=0
        Solute NH4: Thickness=[150, 150, 300, 300, 300, 300, 300]; InitialValues=[0.1, 0.1, 0.1, 0.1, 0.1, 0.1, 0.1]; InitialValuesUnits=kg/ha; WaterTableConcentration=0; D0=0; DepthConstant=0; MaxDepthSoluteAccessible=0; RunoffEffectivenessAtMovingSolute=0; MaxEffectiveRunoff=0
        Solute Urea: Thickness=[150, 150, 300, 300, 300, 300, 300]; InitialValues=[0, 0, 0, 0, 0, 0]; InitialValuesUnits=kg/ha; WaterTableConcentration=0; D0=0; DepthConstant=0; MaxDepthSoluteAccessible=0; RunoffEffectivenessAtMovingSolute=0; MaxEffectiveRunoff=0
        SoilTemperature Temperature: Thickness=[150, 150, 300, 300, 300, 300, 300]; InitialValues=[-1.3, -1, 2, 5, 7.5, 8, 8]
      Plant Soybean
        Cultivar Latham L2744 XF
      Manager Sow using a variable rule
        Crop = [Soybean]
        StartDate = 1-jun
        EndDate = 30-jun
        MinESW = 0
        MinRain = 0
        RainDays = 7
        CultivarName = Latham L2744 XF
        SowingDepth = 35
        RowSpacing = 760
        Population = 38
```csharp
using APSIM.Numerics;
using Models.Climate;
using System.Linq;
using System;
using Models.Core;
using Models.PMF;
using Models.Soils;
using Models.Utilities;
using APSIM.Shared.Utilities;
using Models.Interfaces;

namespace Models
{
    [Serializable]
    public class Script : Model
    {
        [Link] private Clock Clock;
        [Link] private Fertiliser Fertiliser;
        [Link] private Summary Summary;
        [Link] private Soil Soil;
        private Accumulator accumulatedRain;
        [Link]
        private ISoilWater waterBalance;

        [Description("Crop")]
        public IPlant Crop { get; set; }

        [Description("Start of sowing window (d-mmm)")]
        public string StartDate { get; set; }

        [Description("End of sowing window (d-mmm)")]
        public string EndDate { get; set; }

        [Description("Minimum extractable soil water for sowing (mm)")]
        public double MinESW { get; set; }

        [Description("Accumulated rainfall required for sowing (mm)")]
        public double MinRain { get; set; }

        [Description("Duration of rainfall accumulation (d)")]
        public int RainDays { get; set; }

        [Display(Type = DisplayType.CultivarName)]
        [Description("Cultivar to be sown")]
        public string CultivarName { get; set; }

        [Description("Sowing depth (mm)")]
        public double SowingDepth { get; set; }

        [Description("Row spacing (mm)")]
        public double RowSpacing { get; set; }

        [Description("Plant population (/m2)")]
        public double Population { get; set; }
        
        [EventSubscribe("StartOfSimulation")]
        private void OnSimulationCommencing(object sender, EventArgs e)
        {
            accumulatedRain = new Accumulator(this, "[Weather].Rain", RainDays);
        }

        [EventSubscribe("DoManagement")]
        private void OnDoManagement(object sender, EventArgs e)
        {
            accumulatedRain.Update();
            
            if (DateUtilities.WithinDates(StartDate, Clock.Today, EndDate) &&
                !Crop.IsAlive &&
                MathUtilities.Sum(waterBalance.ESW) > MinESW &&
                accumulatedRain.Sum > MinRain)
            {
                Crop.Sow(population: Population, cultivar: CultivarName, depth: SowingDepth, rowSpacing: RowSpacing);
            }
        }
    }
}
```
      Manager Fertilise at sowing
        Crop = [Soybean]
        FertiliserType = NO3N
        Amount = 50
```csharp
using Models.Soils;
using System;
using System.Linq;
using Models.Core;
using Models.PMF;
namespace Models
{
    [Serializable]
    public class Script : Model
    {
        [Link] Clock Clock;
        [Link] Fertiliser Fertiliser;
        
        [Description("Crop to be fertilised")]
        public IPlant Crop { get; set; }

        [Description("Type of fertiliser to apply? ")] 
        [Display(Type = DisplayType.FertiliserType)]public string FertiliserType { get; set; }
    
        [Description("Amount of fertiliser to be applied (kg/ha)")]
        public double Amount { get; set; }
        
        [EventSubscribe("Sowing")]
        private void OnSowing(object sender, EventArgs e)
        {
            Model crop = sender as Model;
            if (Crop != null && crop.Name.ToLower() == (Crop as IModel).Name.ToLower())
                Fertiliser.Apply(amount: Amount, type: FertiliserType);
        }
    }
}
```
      Manager Harvest
        Crop = [Soybean]
```csharp
using APSIM.Shared.Utilities;
using Models.Utilities;
using Models.Soils;
using Models.PMF;
using Models.Core;
using System;
using System.Linq;

namespace Models
{
    [Serializable] 
    public class Script : Model
    {
        [Description("Crop")]
        public IPlant Crop { get; set; }
        
        [EventSubscribe("DoManagement")]
        private void OnDoManagement(object sender, EventArgs e)
        {
            if (Crop.IsReadyForHarvesting)
            {
                Crop.Harvest();
                Crop.EndCrop();
            }
        }
    }
}
```
      Manager ParameterSetupScript
```csharp
using System;
using Models.Core;
using Models.Interfaces;
using Models.PMF;
using APSIM.Shared.Utilities;

namespace Models
{
    [Serializable]
    public class Script : Model
    {
        // Parameter setup script placeholder - add parameter initialisation here if needed
    }
}
```
      SurfaceOrganicMatter: InitialResidueName=maize; InitialResidueType=maize; InitialResidueMass=100; InitialStandingFraction=0; InitialCPR=0; InitialCNR=55
      Report: EventNames=[Clock].DoReport
        VariableNames:
          [Clock].Today
          [Weather].MaxT
          [Weather].MinT
          [Weather].Rain
          [Soybean].LAI
          [Soybean].AboveGround.Wt
          [Soybean].Phenology.CurrentStageName
          [Soil].SoilWater.Drainage
          [Soil].SoilWater.Water[1]
          [Soil].SoilWater.Water[2]
          [Soybean].Grain.Wt
          [Soybean].Root.Wt
          [Soybean].AboveGround.NConc
          [Soil].SoilWater.Water[3]
          [Weather].Radn
          [Weather].VP
    DataStore
  DataStore
